!Arquivo com as tipologias das curvas de carga

Edit Loadshape.RES-Type1_WD_A 24 1.0 Pmult=(1.0    0.9592 0.9239 0.8906 0.8476 0.7873 0.6891 0.6111 0.5939 0.5981 0.6139 0.6518 0.6807 0.6838 0.6891 0.6697 0.6604 0.6658 0.7181 0.7591 0.7948 0.8714 0.9455 0.9962) qmult=(0.8884  0.8955  0.8919  0.8601  0.8226  0.7924  0.8008  0.8077  0.8345  0.8312  0.8642  0.8891  0.8573  0.8582  0.8373  0.8562  0.8797  0.8584 0.7784  0.7283  0.7564  0.7879  0.8295  0.864)
Edit Loadshape.RES-Type1_SA_A 24 1.0 Pmult=(1.0    0.9987 0.9688 0.9398 0.8827 0.8372 0.7541 0.6896 0.6591 0.6589 0.6702 0.7171 0.7365 0.7688 0.8169 0.7918 0.7553 0.73   0.7899 0.7871 0.8098 0.8973 0.9284 0.9877) qmult=(0.9457  0.9559  0.9364  0.9047  0.8909  0.8746  0.8461  0.8443  0.8461  0.8902  0.875   0.9306  0.9693  0.9579  0.9341  0.9412  0.9494  0.9029 0.8379  0.8242  0.8206  0.9313  0.9077  0.9426)
Edit Loadshape.RES-Type1_SU_A 24 1.0 Pmult=(0.9815 0.96   0.9292 0.8991 0.8752 0.845  0.7876 0.7408 0.699  0.6777 0.6773 0.6783 0.7088 0.7343 0.7868 0.7789 0.7571 0.7279 0.7792 0.8146 0.8434 0.913  0.9736 1.0)    qmult=(0.8321  0.8255  0.8313  0.8122  0.7729  0.7552  0.7054  0.7046  0.7167  0.7399  0.7696  0.7729  0.7884  0.7546  0.8004  0.8073  0.7909  0.7583 0.7051  0.6968  0.7113  0.7527  0.7944  0.782)
Edit Loadshape.RES-Type1_WD_B 24 1.0 Pmult=(0.9796 0.9651 0.9599 0.9741 0.9595 0.9372 0.8832 0.8673 0.9312 0.9018 0.8912 0.9128 0.8638 0.8531 0.8972 0.8818 0.8856 0.8802 0.9239 0.9371 0.9624 0.9747 1.0    0.9823) qmult=(1.0041  1.2165  1.18    1.3239  1.1911  1.0895  1.3111  1.4472  1.7029  1.6566  1.6075  1.6448  1.2311  1.3176  1.678   1.883   1.6909  1.7284 1.069   1.1791  1.1422  1.3981  0.9001  1.041)
Edit Loadshape.RES-Type1_SA_B 24 1.0 Pmult=(0.8808 0.9244 1.0    0.9456 0.9196 0.9132 0.8147 0.8254 0.8102 0.7933 0.7625 0.7754 0.7675 0.7566 0.7214 0.772  0.7507 0.7624 0.8401 0.8106 0.8144 0.8723 0.8916 0.8725) qmult=(0.6544  0.4939  1.496   0.9492  0.8954  1.1724  0.4812  0.1739  0.4175  0.0924  -0.1276 0.4391  0.8183  1.0015  0.1876  0.2086  -0.2943 0.7367 0.1093  -0.5056 -0.035  0.2904  0.5123  0.0681)
Edit Loadshape.RES-Type1_SU_B 24 1.0 Pmult=(0.9612 0.9257 0.9247 0.9435 0.96   0.9185 0.8847 0.8472 0.7989 0.8311 0.7919 0.806  0.7395 0.7404 0.7597 0.7869 0.7674 0.8046 0.841  0.8416 0.8434 0.9303 0.9874 1.0)    qmult=(1.228   1.3071  1.565   1.1925  1.6056  1.2472  1.1997  0.8403  0.8595  1.0116  0.9415  1.1342  0.5332  0.3291  0.7282  0.6731  0.4095  0.9397 1.1128  0.4348  0.5394  1.134   0.8919  0.8303)
Edit Loadshape.RES-Type1_WD_C 24 1.0 Pmult=(0.9566 0.9524 0.9409 0.9294 0.9267 0.8481 0.7325 0.7336 0.8012 0.8425 0.8813 0.8763 0.832  0.8348 0.8991 0.8491 0.8026 0.789  0.7871 0.8337 0.9465 1.0    0.9896 0.9832) qmult=(0.6503  1.1976  1.2518  1.2087  1.4629  1.6282  1.613   1.575   1.6524  1.2641  1.3823  1.7616  0.9933  1.1906  1.2715  1.2966  1.3699  1.2334 1.1352  0.7684  0.8421  1.0046  1.099   1.6063)
Edit Loadshape.RES-Type1_SA_C 24 1.0 Pmult=(1.0    0.9199 0.8723 0.8702 0.8858 0.8254 0.7042 0.6898 0.7201 0.7245 0.7487 0.7165 0.6659 0.708  0.7296 0.7135 0.7294 0.7178 0.7802 0.8469 0.9114 0.9091 0.9373 0.9376) qmult=(0.3665  0.3238  0.5082  0.5319  0.5423  0.6362  0.5592  0.5709  0.5721  0.5159  0.3464  0.3635  0.2884  0.3862  0.3776  0.2471  0.2966  0.3269 0.3101  0.1258  0.1362  0.4257  0.399   0.594)
Edit Loadshape.RES-Type1_SU_C 24 1.0 Pmult=(0.9444 0.8959 0.9106 0.92   0.9034 0.8379 0.7469 0.7212 0.7476 0.7336 0.7287 0.7462 0.7228 0.7198 0.7887 0.7726 0.7282 0.6935 0.8015 0.8346 0.9163 1.0    0.9862 0.9288) qmult=(0.1171  0.1404  0.0964  0.012   0.092   0.244   0.2791  0.3062  0.1068  0.1956  0.1868  0.1545  0.2448  0.2519  0.0994  0.115   0.233   0.2066 0.2115  0.1172  0.0423  -0.0467 -0.0709 -0.0951)
Edit Loadshape.RES-Type2_WD_A 24 1.0 Pmult=(0.9987 0.9884 0.9617 0.9305 0.8966 0.8294 0.6886 0.5762 0.5341 0.5503 0.5718 0.5864 0.5918 0.6514 0.6782 0.67   0.6261 0.5821 0.6064 0.6573 0.7359 0.8678 0.9587 1.0)    qmult=(0.9426  0.9455  0.9429  0.9177  0.8858  0.8555  0.8366  0.814   0.8023  0.8411  0.9125  0.9285  0.9504  0.9971  0.9194  0.8721  0.8456  0.8448 0.8907  0.9242  0.934   0.9816  0.942   0.9435)
Edit Loadshape.RES-Type2_SA_A 24 1.0 Pmult=(1.0    0.9595 0.9088 0.8896 0.8477 0.7939 0.7204 0.6368 0.6157 0.5595 0.5712 0.5702 0.6272 0.6675 0.7095 0.6476 0.631  0.6231 0.6102 0.6752 0.7386 0.7635 0.8369 0.9064) qmult=(0.9123  0.86    0.905   0.873   0.8876  0.8207  0.8344  0.7796  0.9407  0.9349  0.9686  0.9255  0.9393  1.0912  1.0357  0.9964  0.9507  0.9357 0.86    0.8552  0.9102  0.8193  0.9686  0.8931)
Edit Loadshape.RES-Type2_SU_A 24 1.0 Pmult=(0.9905 0.9942 0.9656 0.9406 0.9386 0.8985 0.8174 0.7135 0.6287 0.5905 0.5755 0.5849 0.5774 0.6261 0.6424 0.6162 0.6317 0.6395 0.6552 0.6954 0.7566 0.8706 0.9201 1.0)    qmult=(0.8397  0.886   0.8379  0.827   0.8558  0.8897  0.8496  0.8156  0.7901  0.7644  0.7867  0.7389  0.7212  0.8243  0.7239  0.6729  0.7977  0.8378 0.7986  0.7587  0.8354  0.8209  0.8586  0.8627)
Edit Loadshape.RES-Type2_WD_B 24 1.0 Pmult=(0.772  0.7474 0.7229 0.7196 0.7347 0.7045 0.7073 0.7099 0.8806 0.9993 0.9414 0.9564 0.8942 0.923  0.9499 1.0    0.9405 0.8559 0.8408 0.8584 0.8397 0.823  0.8748 0.8236) qmult=(0.4682  0.3584  0.4532  0.4388  0.5178  0.4028  0.3729  0.3594  0.4566  0.6932  0.6074  0.6666  0.5002  0.5449  0.6031  0.6179  0.467   0.391  0.3074  0.3796  0.3304  0.2707  0.4667  0.5411)
Edit Loadshape.RES-Type2_SA_B 24 1.0 Pmult=(0.9216 0.8741 0.855  0.883  0.8887 0.8597 0.8161 0.8721 0.9139 0.976  0.9487 0.8688 0.8874 0.8225 0.9273 0.8326 0.8525 0.7663 0.87   0.8734 0.908  0.8639 0.9247 1.0)    qmult=(0.6665  0.6176  0.5855  0.6078  0.7199  0.5286  0.4333  0.5904  0.7028  0.7478  0.654   0.5839  0.6128  0.4995  0.6494  0.5002  0.432   0.2347 0.2077  0.2214  0.1422  0.1895  0.4644  0.6435)
Edit Loadshape.RES-Type2_SU_B 24 1.0 Pmult=(0.9277 0.8579 0.8612 0.8934 0.8513 0.821  0.7848 0.8421 0.8215 0.8036 0.7089 0.6858 0.7396 0.8303 0.7906 0.7956 0.8156 0.8868 0.9054 0.9231 0.8948 0.8777 1.0    0.9631) qmult=(0.5055  0.3401  0.5298  0.7992  0.6804  0.588   0.5553  0.5332  0.558   0.4841  0.4075  0.4568  0.3009  0.4609  0.4031  0.1821  0.1187  0.3071 0.4096  0.3331  0.1965  0.1777  0.6908  0.7039)
Edit Loadshape.RES-Type2_WD_C 24 1.0 Pmult=(1.0    0.9691 0.9407 0.9285 0.8957 0.8769 0.7011 0.6248 0.7171 0.7502 0.7759 0.8007 0.7221 0.7719 0.9406 0.9336 0.8584 0.7585 0.6621 0.6986 0.7893 0.7962 0.8827 0.9939) qmult=(0.996   0.9723  0.8739  0.739   0.7082  0.5713  0.6225  0.5772  0.6733  0.7816  0.8922  0.9677  0.8745  0.7965  0.9363  0.9001  1.0743  1.0672 0.8864  0.8639  0.9291  0.9123  0.9254  1.011)
Edit Loadshape.RES-Type2_SA_C 24 1.0 Pmult=(0.9712 0.9515 0.9454 1.0    0.9908 0.9072 0.7879 0.8363 0.8947 0.8587 0.9302 0.838  0.7166 0.9538 0.9818 0.9598 0.8991 0.8489 0.9061 0.9084 0.8401 0.8724 0.8791 0.9065) qmult=(0.6609  0.665   0.6255  0.5165  0.38    0.3676  0.211   0.1917  0.1396  -0.0545 0.4013  0.2076  0.3789  0.7377  0.641   0.6071  0.5887  0.6484 0.6821  0.752   0.7031  0.4773  0.4513  0.4884)
Edit Loadshape.RES-Type2_SU_C 24 1.0 Pmult=(0.8303 0.7937 0.8394 0.8755 0.8711 0.8294 0.804  0.7906 0.738  0.6842 0.6666 0.6012 0.6311 0.6953 0.8233 0.8289 0.7378 0.8603 0.8788 0.8306 0.8707 0.927  0.9771 1.0)    qmult=(0.6789  0.6096  0.7319  0.8409  0.7663  0.6858  0.6694  0.501   0.1131  0.313   0.393   0.3076  0.5273  0.5699  0.7183  0.7607  0.6407  1.2123 1.2113  0.983   0.8603  0.8585  1.1672  1.1871)
Edit Loadshape.RES-Type3_WD_A 24 1.0 Pmult=(0.7914 0.7593 0.7434 0.7364 0.7282 0.7251 0.7304 0.7753 0.9745 0.9607 0.9736 1.0    0.978  0.975  0.9809 0.9744 0.9445 0.8878 0.8387 0.8389 0.8716 0.8637 0.8788 0.8377) qmult=(0.5344  0.4881  0.4798  0.5019  0.4605  0.432   0.4303  0.5405  0.5697  0.468   0.5135  0.3993  0.475   0.5393  0.5831  0.5435  0.5612  0.4788 0.2824  0.2558  0.2994  0.2979  0.3553  0.4796)
Edit Loadshape.RES-Type3_SA_A 24 1.0 Pmult=(1.0    0.9568 0.9268 0.9153 0.9065 0.8824 0.8295 0.8812 0.9365 0.9979 0.9527 0.8807 0.8843 0.871  0.7336 0.7074 0.7048 0.7889 0.9134 0.9971 0.9739 0.9771 0.9596 0.9276) qmult=(0.5752  0.5858  0.5184  0.5938  0.6313  0.6685  0.5422  0.6122  0.4981  0.6433  0.4873  0.3972  0.2951  0.445   0.4903  0.517   0.5625  0.4704 0.2252  0.3582  0.3193  0.2159  0.2515  0.4184)
Edit Loadshape.RES-Type3_SU_A 24 1.0 Pmult=(0.8899 0.8693 0.8633 0.8764 0.8475 0.8362 0.7483 0.7385 0.7389 0.6624 0.709  0.7485 0.7221 0.7569 0.7491 0.8601 0.8641 0.9179 0.9602 0.9119 0.9852 1.0    0.9592 0.9564) qmult=(0.2696  0.2744  0.2349  0.4054  0.3827  0.3841  0.2656  0.3719  0.2794  0.2103  0.2719  0.3006  0.2957  0.4203  0.422   0.493   0.3072  0.3725 0.2321  0.0989  0.2328  0.3323  0.3879  0.3384)
Edit Loadshape.RES-Type3_WD_B 24 1.0 Pmult=(0.5601 0.5699 0.5552 0.5478 0.5302 0.5155 0.5155 0.7882 0.9039 0.8873 0.9026 0.9093 0.8645 0.8499 0.9578 1.0    0.9266 0.8284 0.7315 0.7187 0.7071 0.6675 0.6331 0.5876) qmult=(0.3364  0.3499  0.3305  0.3463  0.3177  0.3366  0.3524  0.4626  0.5339  0.5687  0.5637  0.5086  0.4765  0.4105  0.4114  0.497   0.5079  0.5111 0.4059  0.3519  0.3406  0.3777  0.394   0.3279)
Edit Loadshape.RES-Type3_SA_B 24 1.0 Pmult=(0.6937 0.772  0.7143 0.6702 0.6673 0.6714 0.6746 0.7217 0.7177 0.8909 0.8667 0.8611 0.8273 0.7256 0.8706 0.9001 0.7979 0.8363 0.9426 1.0    0.9455 0.9494 0.8492 0.7415) qmult=(0.562   0.6225  0.6266  0.5214  0.471   0.5173  0.5648  0.4979  0.494   0.6954  0.706   0.5007  0.5868  0.4795  0.5449  0.5453  0.5917  0.7429 0.7046  0.7552  0.7929  0.6813  0.5859  0.6098)
Edit Loadshape.RES-Type3_SU_B 24 1.0 Pmult=(0.8097 0.7371 0.7241 0.734  0.7591 0.73   0.7195 0.6484 0.7534 0.6748 0.6956 0.5742 0.7265 0.7566 0.8237 0.8934 0.8362 0.9292 1.0    0.9976 0.9793 0.9828 0.9066 0.8719) qmult=(0.4423  0.3316  0.2797  0.3551  0.477   0.4125  0.5749  0.4584  0.7666  0.5265  0.3518  0.2212  0.4073  0.3399  0.2908  0.4712  0.5153  0.6471 0.6392  0.5969  0.5956  0.7448  0.6164  0.5827)
Edit Loadshape.RES-Type3_WD_C 24 1.0 Pmult=(0.5994 0.5969 0.5752 0.5505 0.5106 0.4479 0.4507 0.7166 0.9773 1.0    0.9769 0.9697 0.8305 0.8197 0.8517 0.8229 0.7899 0.7791 0.7431 0.6573 0.5838 0.543  0.5781 0.5598) qmult=(0.4312  0.4102  0.4289  0.4424  0.4007  0.3883  0.4011  0.5533  0.6519  0.6538  0.6109  0.6208  0.5618  0.4184  0.4192  0.5203  0.5228  0.5479 0.5747  0.5434  0.5317  0.479   0.4321  0.4179)
Edit Loadshape.RES-Type3_SA_C 24 1.0 Pmult=(0.7719 0.7978 0.7688 0.7477 0.7142 0.648  0.5829 0.6624 0.8947 0.9684 0.9279 0.9102 0.7989 0.6645 0.6587 0.6486 0.7843 0.8113 0.829  0.869  0.8044 0.8902 1.0    0.8624) qmult=(0.6428  0.6855  0.7017  0.8579  0.7862  0.8346  0.8008  0.6717  1.0417  1.2604  1.4044  1.1993  1.1833  0.8418  0.883   0.7336  0.8825  0.9843 1.01    1.1525  1.2417  1.2245  1.1503  1.0761)
Edit Loadshape.RES-Type3_SU_C 24 1.0 Pmult=(0.9099 0.915  0.8849 0.8739 0.8519 0.8062 0.7744 0.7709 0.813  0.7947 0.9059 0.8954 0.8674 0.7865 0.7678 0.875  0.8742 0.9213 0.9379 1.0    0.9952 0.9013 0.9135 0.8904) qmult=(0.7529  0.7605  0.7333  0.7538  0.9197  0.9678  0.631   0.6068  0.774   0.6901  0.8315  0.8535  0.6075  0.6428  0.6156  0.7338  0.7008  0.7831 0.9609  1.0253  0.8881  0.6013  0.6604  0.7088)
Edit Loadshape.COM-Type1_WD_A 24 1.0 Pmult=(0.68   0.6874 0.6911 0.6956 0.6918 0.687  0.6786 0.7195 0.8879 0.9869 1.0    0.9819 0.867  0.876  0.9333 0.9659 0.9595 0.8763 0.7855 0.7288 0.7089 0.6865 0.6764 0.6716) qmult=(0.5465  0.529   0.5157  0.4888  0.4991  0.4944  0.4923  0.4513  0.5799  0.7851  0.7912  0.8278  0.7201  0.8291  0.9176  0.983   0.8997  0.7757 0.6521  0.598   0.6376  0.6248  0.5974  0.6063)
Edit Loadshape.COM-Type1_SA_A 24 1.0 Pmult=(0.753  0.7731 0.7709 0.7593 0.7559 0.7589 0.7432 0.7572 0.9101 0.9598 0.9737 1.0    0.93   0.8488 0.8495 0.811  0.7599 0.7599 0.7526 0.752  0.73   0.7208 0.7131 0.7135) qmult=(0.5514  0.5951  0.5782  0.5321  0.5302  0.5637  0.5598  0.4402  0.4886  0.5927  0.719   0.8289  0.7536  0.6715  0.6174  0.6579  0.5717  0.5698 0.5356  0.5156  0.4421  0.4396  0.4978  0.5083)
Edit Loadshape.COM-Type1_SU_A 24 1.0 Pmult=(0.8815 0.9121 0.9038 0.9025 0.8973 0.9464 0.8707 0.8974 0.9166 1.0    0.8995 0.9018 0.9472 0.9351 0.9225 0.9169 0.9298 0.9276 0.9686 0.9958 0.9645 0.9514 0.9498 0.9574) qmult=(0.5868  0.5741  0.5365  0.5601  0.5511  0.6621  0.4774  0.4066  0.346   0.4526  0.4122  0.37    0.4254  0.5442  0.4574  0.4863  0.4465  0.3979 0.3923  0.3618  0.4017  0.4362  0.4458  0.4908)
Edit Loadshape.COM-Type1_WD_B 24 1.0 Pmult=(0.7266 0.7177 0.7207 0.7243 0.7169 0.7246 0.7116 0.7404 0.8677 0.927  0.9056 0.8951 0.8087 0.8311 0.9691 1.0    0.9687 0.8877 0.8036 0.7807 0.766  0.7088 0.7122 0.7261) qmult=(0.4181  0.372   0.3475  0.399   0.1631  0.144   0.0579  0.2934  0.6967  0.8136  0.4737  0.8967  0.5406  0.7338  0.8487  0.9848  1.0088  0.8001 0.0713  -0.2765 -0.3756 -0.0029 0.2053  0.286)
Edit Loadshape.COM-Type1_SA_B 24 1.0 Pmult=(0.847  0.8716 0.846  0.8531 0.8024 0.7966 0.8171 0.8342 0.9583 1.0    0.9834 0.9296 0.8993 0.8573 0.8435 0.8483 0.9071 0.937  0.8992 0.8681 0.7693 0.7842 0.82   0.7953) qmult=(0.3463  0.5305  0.079   1.0766  0.7627  -0.8141 0.0494  -0.2483 -0.0849 0.4677  0.0088  -0.7811 -0.3636 -0.3236 -1.0737 -1.4836 -0.1731 -1.205 -1.0027 -0.7231 -1.4768 -1.1434 -0.9054 -1.2955)
Edit Loadshape.COM-Type1_SU_B 24 1.0 Pmult=(0.9342 0.9587 0.9759 0.9474 0.9432 0.9169 0.8743 0.9001 1.0    0.9646 0.899  0.8697 0.8218 0.8012 0.7993 0.7791 0.7828 0.8355 0.9459 0.976  0.9742 0.9454 0.9256 0.9683) qmult=(0.0288  0.2558  0.1903  -0.0989 0.0085  0.0046  0.1393  0.3386  0.435   -0.0246 0.0925  0.3585  0.0621  0.1097  0.1976  0.0377  0.2333  0.4005 0.0027  -0.2084 -0.1381 -0.1528 0.0348  0.2871)
Edit Loadshape.COM-Type1_WD_C 24 1.0 Pmult=(0.8265 0.8282 0.828  0.8303 0.8283 0.8371 0.8156 0.7887 0.9234 0.9607 0.956  0.9346 0.878  0.9127 0.9839 0.9844 1.0    0.9141 0.8683 0.8782 0.8837 0.7941 0.805  0.8155) qmult=(0.6004  0.5806  0.5855  0.5784  0.6281  0.6775  0.76    0.8561  0.9624  0.9833  0.9836  0.8976  0.817   0.9404  1.1249  1.0988  0.9683  0.8548 0.6482  0.7218  0.6357  0.4953  0.5439  0.5415)
Edit Loadshape.COM-Type1_SA_C 24 1.0 Pmult=(0.8639 0.8715 0.87   0.8808 0.8873 0.8714 0.8582 0.8192 0.9431 1.0    0.9572 0.9013 0.8776 0.8439 0.8415 0.7857 0.7813 0.8551 0.8372 0.8788 0.8105 0.809  0.8238 0.8239) qmult=(0.4073  0.3294  0.3814  0.3739  0.3668  0.3192  0.3596  0.4351  0.5012  0.6586  0.6175  0.5546  0.6667  0.5641  0.7144  0.6226  0.6236  0.6427 0.4474  0.4543  0.4922  0.3871  0.5033  0.4669)
Edit Loadshape.COM-Type1_SU_C 24 1.0 Pmult=(0.898  0.9242 0.88   0.889  0.8838 0.9151 0.8955 0.8737 0.967  0.9531 0.8728 0.8059 0.8168 0.7799 0.7806 0.8076 0.8191 0.8548 0.9324 1.0    0.9633 0.913  0.8756 0.8722) qmult=(0.5038  0.241   0.2761  0.3255  0.3126  0.6003  0.6549  0.7135  0.8995  0.7695  0.7242  0.4486  0.4659  0.3915  0.3712  0.4796  0.4153  0.4396 0.3895  0.5252  0.7138  0.6758  0.6114  0.5431)
Edit Loadshape.COM-Type2_WD_A 24 1.0 Pmult=(0.5893 0.5669 0.549  0.5441 0.5335 0.5057 0.4524 0.566  0.835  0.9653 0.9977 1.0    0.8765 0.8619 0.9628 0.9822 0.9602 0.8871 0.7173 0.6832 0.644  0.63   0.6386 0.6319) qmult=(0.4525  0.4595  0.4468  0.4657  0.4659  0.4411  0.4196  0.5232  0.6963  0.7944  0.8044  0.7888  0.6889  0.6471  0.6997  0.7359  0.7247  0.6783 0.5847  0.5918  0.5587  0.5038  0.5051  0.4766)
Edit Loadshape.COM-Type2_SA_A 24 1.0 Pmult=(0.8028 0.772  0.749  0.7131 0.7087 0.6869 0.6394 0.6715 0.8664 0.9534 1.0    0.9696 0.8414 0.8135 0.7389 0.7373 0.7    0.7596 0.7668 0.7589 0.7235 0.7108 0.7776 0.8018) qmult=(0.5436  0.5437  0.5357  0.5495  0.5086  0.5544  0.5253  0.4979  0.5591  0.5891  0.561   0.5878  0.5114  0.5924  0.4825  0.4427  0.4295  0.4988 0.429   0.4604  0.5516  0.5101  0.5046  0.5122)
Edit Loadshape.COM-Type2_SU_A 24 1.0 Pmult=(0.9041 0.8899 0.872  0.8513 0.8288 0.7961 0.7835 0.7588 0.7983 0.8162 0.8255 0.8284 0.828  0.8806 0.86   0.8788 0.8751 0.9066 0.9747 0.9737 0.9672 0.9629 1.0    0.9602) qmult=(0.5743  0.6598  0.6266  0.6373  0.6246  0.5652  0.6294  0.5988  0.6847  0.6679  0.6406  0.6059  0.5279  0.6145  0.5519  0.6476  0.6112  0.7407 0.8267  0.7919  0.7635  0.7257  0.7441  0.6568)
Edit Loadshape.COM-Type2_WD_B 24 1.0 Pmult=(0.3286 0.3241 0.3161 0.3016 0.2776 0.3122 0.38   0.5428 0.8791 0.9682 1.0    0.961  0.844  0.8264 0.9354 0.9457 0.8967 0.8536 0.6311 0.5774 0.4721 0.4554 0.4138 0.3654) qmult=(0.4565  0.435   0.4252  0.3953  0.3974  0.4006  0.3874  0.4227  0.583   0.641   0.6833  0.6286  0.3791  0.3924  0.5853  0.6     0.5641  0.5263 0.3937  0.428   0.439   0.4346  0.4175  0.4222)
Edit Loadshape.COM-Type2_SA_B 24 1.0 Pmult=(0.5986 0.5805 0.549  0.5489 0.4825 0.5171 0.615  0.6652 0.8946 0.9784 1.0    0.9556 0.8169 0.7694 0.6938 0.6551 0.7109 0.7188 0.7454 0.7012 0.6959 0.6337 0.4542 0.5083) qmult=(0.6598  0.645   0.6081  0.6024  0.6387  0.5829  0.5078  0.5095  0.7784  0.6819  0.6882  0.5281  0.4772  0.4608  0.3668  0.4339  0.5536  0.6512 0.4855  0.3903  0.3594  0.422   0.3965  0.4251)
Edit Loadshape.COM-Type2_SU_B 24 1.0 Pmult=(0.6393 0.6408 0.641  0.5729 0.6231 0.6296 0.6084 0.6141 0.7041 0.8296 0.8712 0.8727 0.8417 0.8664 0.8673 0.7855 0.8099 0.9304 1.0    0.7667 0.8067 0.7683 0.724  0.7212) qmult=(0.25    0.2878  0.3197  0.2377  0.1972  0.1962  0.2608  0.2427  0.1568  0.151   0.2026  0.2611  0.2712  0.3057  0.3457  0.3347  0.3156  0.3994 0.5338  0.5308  0.5267  0.4684  0.3967  0.4421)
Edit Loadshape.COM-Type2_WD_C 24 1.0 Pmult=(0.5824 0.5692 0.5675 0.5597 0.5549 0.5472 0.5102 0.6243 0.9116 0.994  1.0    0.9563 0.8333 0.8501 0.9275 0.9436 0.9459 0.8922 0.6622 0.6401 0.6449 0.627  0.612  0.5971) qmult=(0.4751  0.4599  0.4481  0.4389  0.4258  0.4472  0.4488  0.5477  0.832   0.8122  0.8356  0.785   0.6113  0.5796  0.6566  0.7793  0.766   0.6808 0.5168  0.469   0.4489  0.4245  0.4349  0.4661)
Edit Loadshape.COM-Type2_SA_C 24 1.0 Pmult=(0.8051 0.812  0.7979 0.7923 0.8006 0.782  0.7187 0.7219 0.9495 1.0    0.9789 0.923  0.817  0.8177 0.7223 0.7056 0.7046 0.7364 0.7724 0.7618 0.7133 0.709  0.7823 0.764)  qmult=(0.7335  0.715   0.7522  0.8306  0.9208  0.7813  0.5652  0.5921  0.9296  1.0339  1.0645  0.9855  0.7186  0.7815  0.6083  0.7755  0.8502  0.8522 0.7952  0.5552  0.5966  0.5566  0.7337  0.7514)
Edit Loadshape.COM-Type2_SU_C 24 1.0 Pmult=(0.908  0.9084 0.8767 0.8766 0.8996 0.8724 0.8488 0.7948 0.7989 0.8435 0.8339 0.8402 0.774  0.7714 0.7926 0.7883 0.7768 0.8462 0.8934 1.0    0.9929 0.9434 0.9292 0.9154) qmult=(0.4981  0.5224  0.5402  0.4927  0.6213  0.3411  0.2461  0.2026  0.2428  0.4945  0.5318  0.5968  0.4457  0.3495  0.5282  0.5604  0.3129  0.566  0.7351  0.7626  0.5888  0.4508  0.5313  0.5478)
Edit Loadshape.COM-Type3_WD_A 24 1.0 Pmult=(0.5008 0.4789 0.473  0.4649 0.4795 0.475  0.4442 0.5598 0.8712 0.9799 1.0    0.9164 0.7714 0.9161 0.9569 0.9536 0.8865 0.7888 0.716  0.6889 0.6605 0.6029 0.5812 0.546)  qmult=(0.2413  0.2408  0.2447  0.2442  0.2441  0.2492  0.2706  0.3047  0.3927  0.4725  0.4944  0.5039  0.4716  0.5102  0.5274  0.5379  0.5152  0.4451 0.3326  0.3306  0.2983  0.2537  0.2529  0.2368)
Edit Loadshape.COM-Type3_SA_A 24 1.0 Pmult=(0.8976 0.844  0.8405 0.7784 0.773  0.7363 0.7101 0.6955 0.8528 0.8772 1.0    0.9722 0.8255 0.7613 0.7511 0.6495 0.6814 0.699  0.9017 0.9005 0.9079 0.8513 0.8954 0.9164) qmult=(0.5487  0.6746  0.6526  0.5448  0.5339  0.5457  0.6597  0.6653  0.7066  0.6292  0.7704  0.835   0.7907  0.7591  0.7382  0.6333  0.6664  0.6424 0.7007  0.6733  0.6646  0.5923  0.5849  0.6037)
Edit Loadshape.COM-Type3_SU_A 24 1.0 Pmult=(0.919  0.8846 0.9294 0.9465 1.0    0.9446 0.8273 0.7426 0.7868 0.894  0.8785 0.8111 0.7515 0.7513 0.7302 0.7916 0.7593 0.866  0.9096 0.8865 0.8665 0.8455 0.8845 0.8781) qmult=(0.5237  0.4629  0.549   0.564   0.6131  0.5056  0.5597  0.5064  0.5121  0.535   0.4961  0.5051  0.4935  0.5356  0.4594  0.5195  0.5421  0.5623 0.4467  0.4804  0.409   0.3417  0.3949  0.4075)
Edit Loadshape.COM-Type3_WD_B 24 1.0 Pmult=(0.4699 0.4523 0.4524 0.4597 0.4876 0.4725 0.4453 0.5911 0.8342 0.9424 0.9772 0.8844 0.7655 0.8915 1.0    0.965  0.9181 0.8069 0.6944 0.6783 0.671  0.6171 0.5839 0.5608) qmult=(0.3742  0.372   0.3655  0.3891  0.4045  0.4006  0.4055  0.4508  0.5496  0.6156  0.6525  0.6589  0.6375  0.6821  0.6867  0.6433  0.6542  0.5987 0.4328  0.3487  0.2949  0.3274  0.2985  0.339)
Edit Loadshape.COM-Type3_SA_B 24 1.0 Pmult=(0.8805 0.7453 0.7208 0.7256 0.7476 0.726  0.6498 0.6348 0.7812 0.863  0.9722 1.0    0.8537 0.8486 0.7972 0.7388 0.7388 0.741  0.875  0.9549 0.9506 0.8721 0.8932 0.8886) qmult=(0.6058  0.6467  0.5164  0.7094  0.727   0.5775  0.6583  0.5158  0.7212  0.716   0.7949  0.842   0.7549  0.7339  0.7273  0.5943  0.6495  0.6335 0.3811  0.5995  0.5373  0.549   0.4937  0.4733)
Edit Loadshape.COM-Type3_SU_B 24 1.0 Pmult=(0.8879 0.8888 0.8914 0.8776 0.9039 0.9037 0.83   0.8304 0.8007 0.9458 0.9431 0.9289 0.9165 0.9315 0.9535 1.0    0.9541 0.9234 0.935  0.9631 0.9729 0.9506 0.9678 0.9368) qmult=(0.7583  0.6613  0.7631  0.5996  0.6662  0.6681  0.7808  0.7915  0.7363  0.762   0.6401  0.7018  0.7092  0.7248  0.6536  0.6068  0.6786  0.6478 0.3114  0.2561  0.1802  0.14    0.3991  0.4506)
Edit Loadshape.COM-Type3_WD_C 24 1.0 Pmult=(0.5486 0.5163 0.5337 0.5028 0.525  0.5042 0.4555 0.548  0.8409 0.9671 0.9685 0.8784 0.785  0.9743 1.0    0.9913 0.9064 0.8224 0.8156 0.8003 0.7908 0.744  0.6886 0.6494) qmult=(0.4772  0.4697  0.4809  0.4742  0.466   0.4557  0.3862  0.3982  0.3566  0.4302  0.4229  0.3963  0.4093  0.5415  0.4855  0.4729  0.4637  0.4532 0.4813  0.5067  0.4854  0.4712  0.4367  0.4259)
Edit Loadshape.COM-Type3_SA_C 24 1.0 Pmult=(0.8821 0.8076 0.7455 0.7332 0.7933 0.7105 0.609  0.5663 0.6909 0.8907 0.8957 0.9849 0.8943 0.866  0.742  0.7095 0.7213 0.6662 0.9015 0.8793 0.9666 0.9382 1.0    0.936)  qmult=(0.3624  0.4599  0.4091  0.4135  0.4733  0.368   0.3518  0.3505  0.3863  0.3566  0.3304  0.3931  0.3805  0.4227  0.4437  0.419   0.4119  0.3261 0.435   0.4911  0.525   0.4878  0.4702  0.4231)
Edit Loadshape.COM-Type3_SU_C 24 1.0 Pmult=(0.9492 0.9419 0.9867 1.0    0.9707 0.9526 0.812  0.7773 0.7315 0.757  0.7999 0.7426 0.7612 0.7487 0.7859 0.7636 0.7508 0.8032 0.9344 0.9466 0.9486 0.9766 0.9261 0.9791) qmult=(0.7724  0.7285  0.8025  0.7849  0.7181  0.697   0.6431  0.5891  0.6151  0.5046  0.5073  0.5635  0.6114  0.6169  0.6191  0.6071  0.5911  0.5896 0.6665  0.6487  0.6909  0.68    0.6516  0.7031)
Edit Loadshape.COM-Type4_WD_A 24 1.0 Pmult=(0.1705 0.1606 0.1606 0.1663 0.1463 0.1476 0.2114 0.5323 0.8096 0.9413 0.9612 0.9119 0.8186 0.8483 0.9256 1.0    0.9581 0.8685 0.7698 0.7458 0.7328 0.6039 0.3083 0.1864) qmult=(0.0116  -0.0069 -0.0069 0.0002  -0.0102 -0.0023 0.0531  0.2493  0.4131  0.4993  0.5236  0.5308  0.5387  0.5146  0.5382  0.5457  0.5309  0.4337 0.3573  0.3298  0.3223  0.2409  0.0807  -0.0022)
Edit Loadshape.COM-Type4_SA_A 24 1.0 Pmult=(0.2301 0.2732 0.2944 0.2963 0.2798 0.2496 0.2535 0.5182 0.8004 0.8266 0.9183 0.8983 0.8865 0.8069 0.8252 0.9393 0.9542 0.9189 1.0    0.9249 0.9608 0.8145 0.4861 0.3337) qmult=(-0.1291 -0.0999 -0.1449 -0.1054 -0.1198 -0.0762 -0.1201 0.3525  0.7296  0.6546  0.719   0.7485  0.7413  0.6285  0.6394  0.6918  0.8206  0.6599 0.5994  0.537   0.5389  0.3854  0.118   -0.0694)
Edit Loadshape.COM-Type4_SU_A 24 1.0 Pmult=(0.4768 0.5068 0.4942 0.4858 0.4888 0.4707 0.502  0.661  0.9143 0.9643 1.0    0.9785 0.9128 0.9717 0.903  0.8943 0.8986 0.9057 0.9308 0.8797 0.8159 0.6168 0.5124 0.4839) qmult=(0.083   0.0876  0.0702  0.0588  0.0637  0.0465  0.1811  0.2995  0.4407  0.5513  0.5747  0.5678  0.5256  0.5257  0.5262  0.4833  0.5021  0.4537 0.4038  0.3625  0.3132  0.0914  0.0708  0.071)
Edit Loadshape.COM-Type4_WD_B 24 1.0 Pmult=(0.1412 0.1497 0.1422 0.1397 0.1314 0.1315 0.1887 0.5373 0.8318 0.9296 0.9376 0.9342 0.8375 0.8348 0.9017 1.0    0.9596 0.8501 0.7108 0.7164 0.6941 0.5369 0.2547 0.1672) qmult=(0.0661  0.0671  0.0679  0.0694  0.0608  0.07    0.132   0.3068  0.3876  0.4324  0.4334  0.4531  0.4499  0.4008  0.4401  0.4826  0.4874  0.4101 0.3975  0.3832  0.3553  0.2867  0.1299  0.0781)
Edit Loadshape.COM-Type4_SA_B 24 1.0 Pmult=(0.3628 0.3489 0.3593 0.3522 0.3843 0.3864 0.3499 0.5966 0.8919 0.8978 0.9519 0.944  0.8957 0.8388 0.8247 0.962  0.9882 0.9692 0.9902 1.0    0.9664 0.8001 0.5152 0.4016) qmult=(0.1689  0.1564  0.1647  0.1449  0.1777  0.2188  0.299   0.4769  0.7177  0.6894  0.7572  0.7779  0.756   0.6855  0.6765  0.7487  0.8073  0.7724 0.7266  0.6665  0.6796  0.5148  0.2718  0.1759)
Edit Loadshape.COM-Type4_SU_B 24 1.0 Pmult=(0.4824 0.4904 0.4925 0.5046 0.5125 0.5046 0.506  0.684  0.9426 0.9997 1.0    0.9604 0.8679 0.9501 0.9465 0.946  0.9232 0.9535 0.9213 0.9264 0.8437 0.6152 0.4786 0.4993) qmult=(0.2257  0.2442  0.2329  0.2362  0.2419  0.2744  0.3203  0.4445  0.6217  0.7427  0.7619  0.7422  0.6424  0.7317  0.6705  0.6712  0.6905  0.7616 0.6196  0.609   0.5238  0.3408  0.2233  0.2676)
Edit Loadshape.COM-Type4_WD_C 24 1.0 Pmult=(0.1934 0.1774 0.1668 0.1687 0.169  0.1595 0.2147 0.547  0.8683 0.9701 0.9808 0.9581 0.8549 0.8995 0.9128 1.0    0.9571 0.8886 0.7798 0.7786 0.7553 0.6072 0.3171 0.2155) qmult=(-0.0515 -0.0472 -0.0492 -0.0494 -0.0452 -0.0418 0.0289  0.2217  0.3962  0.4245  0.4349  0.4368  0.3981  0.4309  0.4434  0.4606  0.4721  0.4166 0.3367  0.3259  0.3056  0.2334  0.0347  -0.0245)
Edit Loadshape.COM-Type4_SA_C 24 1.0 Pmult=(0.2631 0.2987 0.2841 0.2683 0.2579 0.2597 0.2334 0.465  0.82   0.8617 1.0    0.9564 0.872  0.82   0.7638 0.9083 0.9323 0.887  0.9101 0.9051 0.9358 0.8035 0.4634 0.3125) qmult=(-0.205  -0.1138 -0.1455 -0.1428 -0.2047 -0.1818 -0.0843 0.3042  0.8734  0.8988  1.0277  0.8962  0.6519  0.5904  0.5943  0.7845  0.8492  0.7444 0.6493  0.6365  0.7134  0.5693  0.0927  -0.1352)
Edit Loadshape.COM-Type4_SU_C 24 1.0 Pmult=(0.413  0.4089 0.4314 0.4188 0.3924 0.3934 0.4435 0.6143 0.8663 0.8952 0.9396 1.0    0.9107 0.9612 0.9486 0.9126 0.8571 0.8302 0.8221 0.9028 0.8575 0.6135 0.4087 0.4191) qmult=(-0.2377 -0.2686 -0.2812 -0.308  -0.2727 -0.2735 -0.0616 0.2224  0.5475  0.658   0.6238  0.7776  0.5985  0.6285  0.5454  0.6288  0.5104  0.4991 0.4225  0.5457  0.3973  -0.0076 -0.2924 -0.2123)
