New "TCC_Curve.a" npts=5 C_array=[ 1 2.5 4.5 8 14] T_array=[ 0.15 0.07 0.05 0.045 0.045]
New "TCC_Curve.d" npts=5 C_array=[ 1 2.5 4.5 8 14] T_array=[ 6 0.7 0.2 0.06 0.02]
New "TCC_Curve.tlink" npts=7 C_array=[ 2 2.1 3 4 6 22 50] T_array=[ 300 100 10.1 4 1.4 0.1 0.02]
New "TCC_Curve.klink" npts=6 C_array=[ 2 2.2 3 4 6 30] T_array=[ 300 20 4 1.3 0.41 0.02]
New "TCC_Curve.uv1547" npts=2 C_array=[ 0.5 0.9] T_array=[ 0.166 2]
New "TCC_Curve.ov1547" npts=2 C_array=[ 1.1 1.2] T_array=[ 2 0.166]
New "TCC_Curve.mod_inv" npts=15 C_array=[ 1.1 1.3 1.5 2 3 4 5 6 7 8 9 10 20 50 100] T_array=[ 27.1053 9.9029 6.439 3.8032 2.4322 1.9458 1.6883 1.5255 1.4117 1.3267 1.2604 1.2068 0.9481 0.7468 0.6478]
New "TCC_Curve.very_inv" npts=15 C_array=[ 1.1 1.3 1.5 2 3 4 5 6 7 8 9 10 20 50 100] T_array=[ 93.872 28.9113 16.179 7.0277 2.9423 1.7983 1.3081 1.0513 0.8995 0.8023 0.7361 0.6891 0.5401 0.4988 0.493]
New "TCC_Curve.ext_inv" npts=15 C_array=[ 1.1 1.3 1.5 2 3 4 5 6 7 8 9 10 20 50 100] T_array=[ 134.407 40.9913 22.6817 9.5217 3.6467 2.0017 1.2967 0.9274 0.7092 0.5693 0.4742 0.4065 0.1924 0.133 0.1245]
New "TCC_Curve.definite" npts=3 C_array=[ 1 1.001 100] T_array=[ 300 1 1]
new tcc_curve.10k npts=73
~ c_array=[10000 2802.7 2393.09 2167.52 1959.29 1783.51 1630.01 1486.74 1349.3 1236.87 1138.35 1037.26 949.887 862.076 797.389 741.995 684.948 643.128 599.049 564.163 530.247 493.411 453.204 410.487 381.97 353.309 324.194 294.519 268.095 242.825 213.437 192.933 171.287 154.368 139.26 123.76 110.426 98.0371 89.2415 81.5606 74.5407 67.178 61.0899 55.6647 51.6942 47.7198 44.7614 42.1126 39.5018 37.09 34.9999 33.2264 31.5428 29.9745 28.5697 27.3672 26.5584 25.9286 25.5426 25.0869 24.6394 24.1756 23.8634 23.5787 23.2509 22.9966 22.7905 22.6089 22.5187 22.4288 22.4512 22.3393 22.3169]
~ t_array=[0.013298 0.013472 0.013566 0.013689 0.013813 0.013951 0.01412 0.014348 0.014623 0.014888 0.015189 0.015527 0.015936 0.016454 0.016905 0.017437 0.018076 0.018739 0.019562 0.020421 0.021426 0.022887 0.024893 0.027732 0.030253 0.033168 0.037099 0.042376 0.048501 0.056125 0.068415 0.080446 0.098356 0.1174 0.141117 0.175492 0.218239 0.273033 0.328518 0.39449 0.472763 0.583821 0.713794 0.869219 1.02105 1.2212 1.4231 1.64187 1.92676 2.27014 2.64545 3.05824 3.57099 4.16969 4.88829 5.7537 6.5198 7.32903 8.27173 9.49575 10.9774 12.9856 15.0871 17.4763 21.4526 26.1761 33.4766 40.6438 48.8546 59.3142 73.6887 91.8218 121.613]
